Simulations: Version=156
  Memo
    # N Volatilisation simulation

    ### uncertainty in apsoil profile used, soil texture etc.

    Currently all simulations run using same soil profile, should choose relevant soil profile based on clay content etc. in the Schwenke paper or better yet, get locational information from Graeme Schwenke - maybe ask Lukas for an introduction

    ## Schwenke method

    A total of 19 paddocks in north-western NSW
    - mostly vertosol (30-60 g/100g clay content) with high CEC
    - paddock 2, lighter texture and sodicity
    - paddock 7, Chromosol

    2011 - 2013

    2 pasture lands (av. 6 ha)
    - redgrass (Bothriochloa macra (steud) ST Black

    - Rhodes grass (Chloris gayana Kunth.)

    17 cropping paddocks (30-197 ha)

    10 in fallow

    7 cropped with wheat

    7 cropped with mid-late-tillering wheat

    Linear regression

    1. in crop n loss
    2. fallow n loss

    ## Johnson method

    N loss in pasture land

    # to do

    1. Consolidate the manager scripts of different N vol methods into one
    2. Enable the use of SW (ESW in APSIMX) when measured initial SW is not available for the Schwenke method

    	- When init SW is available, need codes to start ESW of the profile at the SW

    3. Enable calculation of FixedWind for Fallow with Met data

    4. double check wind data especially conversion. (m/s to km/h * 3.6)

    5. Obtain original data from Graeme Schwenke at Cairns Soil Conference

    6. Set up simulations with trial data from Turner et al. (2012) and Smith et al. (2020)
  Folder Replacements
    Report DailyReportS: EventNames=[Clock].DoReport
      VariableNames:
        [Clock].Today
        ([Volatilisation].Script.currentNH4-[Volatilisation].Script.newNH4) as deltaN
    Report DailyReportJ: EventNames=[Clock].DoReport
      VariableNames:
        [Clock].Today
        [Volatilisation].Script.NH4reduction+[Volatilisation].Script.UreaReduction as deltaN
    Report: EventNames=[Clock].DoReport
      VariableNames:
        [Clock].Today
        [SoilNitrogen].Organic.N
  DataStore
    ExcelInput Observed: SheetNames=[Sheet 1]
      FileNames=[C:\Users\u8012681\OneDrive - USQ\Work\Research\CRC HPS\PJA4.3.002\ProjectWork\Modelling\SoilN\data\obsN.xlsx]
  Folder InCrop
    Folder Paddock1
      Simulation 1_Schwenke
        Clock: Start=2011-06-01; End=2011-12-04
        Summary SummaryFile
        Weather
          FileName=C:\Users\u8012681\OneDrive - USQ\Work\Research\CRC HPS\PJA4.3.002\ProjectWork\Modelling\SoilN\data\climate\Paddock1.met
        SoilArbitrator
        Zone Field: Area=1; Slope=0; AspectAngle=0; Altitude=50
          Fertiliser
          SurfaceOrganicMatter: InitialResidueName=wheat_stubble; InitialResidueType=wheat; InitialResidueMass=500; InitialStandingFraction=0; InitialCPR=0; InitialCNR=100
          Plant Wheat
          MicroClimate: a_interception=0; b_interception=1; c_interception=0; d_interception=0; SoilHeatFluxFraction=0.4; MinimumHeightDiffForNewLayer=0; NightInterceptionFraction=0.5; ReferenceHeight=2
          Soil: ASCOrder=NA; ASCSubOrder=NA; SoilType=Clay Loam over Clay; Site=24171_44108; NearestTown=NARRABRI; Region=Brigalow Belt South; State=New South Wales; NaturalVegetation=Cleared, non-native vegetation, buildings; ApsoilNumber=9999; Latitude=-30.143; Longitude=149.757; LocationAccuracy=+- 90m; YearOfSampling=2021; Comments=Landuse is Cereals
            DataSource=Soil and Landscape Grid of Australia. This soil parameter file was automatically generated from the GSM National Surfaces using pedotransfer functions.
            Physical
              Thickness  BD       AirDry     LL15      DUL       SAT       KS
              150        1.38925  0.0765109  0.229533  0.362886  0.436374  5.1621
              150        1.43851  0.0801922  0.240577  0.367366  0.424503  3.10853
              150        1.40463  0.0829402  0.24882   0.378878  0.43892   2.43837
              150        1.37368  0.0834011  0.250203  0.382213  0.450425  2.307
              200        1.38919  0.0838998  0.251699  0.381036  0.445947  2.10025
              200        1.4209   0.0840376  0.252113  0.377493  0.435453  1.95924
              200        1.43627  0.0834138  0.250241  0.373804  0.429807  1.99814
              SoilCrop WheatSoil
                LL=[0.237534, 0.248184, 0.256581, 0.257467, 0.25791, 0.25713, 0.254198]
                KL=[0.06, 0.06, 0.0596733, 0.05502, 0.04802, 0.04002, 0.03202]
                XF=[1, 1, 1, 1, 1, 1, 1]
              SoilCrop OatsSoil
                LL=[0.237534, 0.248184, 0.256581, 0.257467, 0.25791, 0.25713, 0.254198]
                KL=[0.06, 0.06, 0.0596733, 0.05502, 0.04802, 0.04002, 0.03202]
                XF=[1, 1, 1, 1, 1, 1, 1]
              SoilCrop SorghumSoil
                LL=[0.238867, 0.249452, 0.257887, 0.258869, 0.259397, 0.258697, 0.255866]
                KL=[0.07, 0.07, 0.0697142, 0.0656425, 0.0595175, 0.0525175, 0.0455175]
                XF=[1, 1, 1, 1, 1, 1, 1]
              SoilCrop BarleySoil
                LL=[0.238867, 0.249452, 0.257881, 0.258767, 0.259158, 0.258311, 0.255332]
                KL=[0.07, 0.07, 0.0696637, 0.0648735, 0.0576676, 0.0494324, 0.0411971]
                XF=[1, 1, 1, 1, 1, 1, 1]
              SoilCrop ChickpeaSoil
                LL=[0.237534, 0.248184, 0.256624, 0.258124, 0.258866, 0.257902, 0.254807]
                KL=[0.06, 0.06, 0.06, 0.06, 0.0554077, 0.0461769, 0.0369462]
                XF=[1, 1, 1, 1, 1, 1, 1]
              SoilCrop MungbeanSoil
                LL=[0.237534, 0.248184, 0.256624, 0.257863, 0.257911, 0.25663, 0.253211]
                KL=[0.06, 0.06, 0.06, 0.05802, 0.04803, 0.03603, 0.02403]
                XF=[1, 1, 1, 1, 1, 1, 1]
              SoilCrop CottonSoil
                LL=[0.242868, 0.253256, 0.261826, 0.263404, 0.264633, 0.263958, 0.260542]
                KL=[0.1, 0.1, 0.1, 0.1, 0.1, 0.0944722, 0.0833611]
                XF=[1, 1, 1, 1, 1, 1, 1]
              SoilCrop CanolaSoil
                LL=[0.237534, 0.248184, 0.256581, 0.257467, 0.25791, 0.25713, 0.254198]
                KL=[0.06, 0.06, 0.0596733, 0.05502, 0.04802, 0.04002, 0.03202]
                XF=[1, 1, 1, 1, 1, 1, 1]
              SoilCrop Pigeon PeaSoil
                LL=[0.237534, 0.248184, 0.256624, 0.258124, 0.258816, 0.257758, 0.254569]
                KL=[0.06, 0.06, 0.06, 0.06, 0.055025, 0.045025, 0.035025]
                XF=[1, 1, 1, 1, 1, 1, 1]
              SoilCrop MaizeSoil
                LL=[0.237534, 0.248184, 0.256581, 0.257467, 0.25791, 0.25713, 0.254198]
                KL=[0.06, 0.06, 0.0596733, 0.05502, 0.04802, 0.04002, 0.03202]
                XF=[1, 1, 1, 1, 1, 1, 1]
              SoilCrop CowpeasSoil
                LL=[0.237534, 0.248184, 0.256581, 0.257467, 0.25791, 0.25713, 0.254198]
                KL=[0.06, 0.06, 0.0596733, 0.05502, 0.04802, 0.04002, 0.03202]
                XF=[1, 1, 1, 1, 1, 1, 1]
              SoilCrop SunflowerSoil
                LL=[0.242804, 0.252327, 0.259726, 0.260108, 0.260072, 0.258754, 0.255333]
                KL=[0.0995196, 0.0926765, 0.0838529, 0.0750294, 0.0647353, 0.0529706, 0.0412059]
                XF=[1, 1, 1, 1, 1, 1, 1]
              SoilCrop FababeanSoil
                LL=[0.240201, 0.25072, 0.259225, 0.260764, 0.261863, 0.260714, 0.257306]
                KL=[0.08, 0.08, 0.08, 0.08, 0.0785857, 0.0686, 0.0571714]
                XF=[1, 1, 1, 1, 1, 1, 1]
              SoilCrop LucerneSoil
                LL=[0.242868, 0.253256, 0.261826, 0.263404, 0.264633, 0.264651, 0.262598]
                KL=[0.1, 0.1, 0.1, 0.1, 0.1, 0.1, 0.1]
                XF=[1, 1, 1, 1, 1, 1, 1]
              SoilCrop PerennialsSoil
                LL=[0.242868, 0.253256, 0.261826, 0.263404, 0.264633, 0.263958, 0.260542]
                KL=[0.1, 0.1, 0.1, 0.1, 0.1, 0.0944722, 0.0833611]
                XF=[1, 1, 1, 1, 1, 1, 1]
              SoilCrop LupinsSoil
                LL=[0.237534, 0.248184, 0.256581, 0.257467, 0.25791, 0.25713, 0.254198]
                KL=[0.06, 0.06, 0.0596733, 0.05502, 0.04802, 0.04002, 0.03202]
                XF=[1, 1, 1, 1, 1, 1, 1]
              SoilCrop LentilsSoil
                LL=[0.237534, 0.248184, 0.256581, 0.257467, 0.25791, 0.25713, 0.254198]
                KL=[0.06, 0.06, 0.0596733, 0.05502, 0.04802, 0.04002, 0.03202]
                XF=[1, 1, 1, 1, 1, 1, 1]
              SoilCrop TriticaleSoil
                LL=[0.238867, 0.249452, 0.257308, 0.257558, 0.257465, 0.256106, 0.252604]
                KL=[0.07, 0.07, 0.0652591, 0.0557136, 0.0445773, 0.03185, 0.0191227]
                XF=[1, 1, 1, 1, 1, 1, 1]
              SoilCrop MilletSoil: same as InCrop.Paddock1.1_Schwenke.Field.Soil.Physical.SorghumSoil
              SoilCrop SoybeansSoil
                LL=[0.237534, 0.248184, 0.256581, 0.257467, 0.25791, 0.25713, 0.254198]
                KL=[0.06, 0.06, 0.0596733, 0.05502, 0.04802, 0.04002, 0.03202]
                XF=[1, 1, 1, 1, 1, 1, 1]
              SoilCrop Pasture grasses & legumesSoil
                LL=[0.237534, 0.248184, 0.256581, 0.257467, 0.25791, 0.25713, 0.254198]
                KL=[0.06, 0.06, 0.0596733, 0.05502, 0.04802, 0.04002, 0.03202]
                XF=[1, 1, 1, 1, 1, 1, 1]
            WaterBalance SoilWater: SummerDate=1-nov; SummerU=6; SummerCona=6; WinterDate=1-apr; WinterU=4; WinterCona=2.5; DiffusConst=64.6305; DiffusSlope=33.241; Salb=0.13; CN2Bare=90; CNRed=20; CNCov=0; DischargeWidth=10; CatchmentArea=11450.5; PSIDul=-100
            Organic: FOMCNRatio=40; CarbonUnits=Total
              Thickness  Carbon    SoilCNRatio  FBiom    FInert    FOM
              150        1.2299    10.1167      0.04     0.401255  417.668
              150        0.791863  10.1167      0.03106  0.614584  287.059
              150        0.645767  10.1167      0.01404  0.753576  197.293
              150        0.554977  10.1167      0.01     0.876964  135.597
              200        0.466387  10.1167      0.01     0.992357  82.2438
              200        0.395554  10.1167      0.01     1         49.8834
              200        0.360487  10.1167      0.01     1         30.2558
            Chemical: Thickness=[150, 150, 150, 150, 200, 200, 200]; PHUnits=Water
              PH=[7.50819, 7.81369, 8.05394, 8.15907, 8.24905, 8.31702, 8.34813]
            Water: Thickness=[150, 150, 150, 150, 200, 200, 200]; InitialValues=[0.23, 0.241, 0.249, 0.25, 0.252, 0.252, 0.25]; RelativeTo=LL15; FilledFromTop=false
            CERESSoilTemperature
            SoilNitrogen: fom_types=[default, manure, mucuna, lablab, shemp, stable]; fract_carb=[0.2, 0.3, 0.54, 0.57, 0.45, 0]; fract_cell=[0.7, 0.3, 0.37, 0.37, 0.47, 0.1]; fract_lign=[0.1, 0.4, 0.09, 0.06, 0.08, 0.9]; NPartitionApproach=0
            SoilNitrogenNO3 NO3: Thickness=[150, 150, 150, 150, 200, 200, 200]; InitialValues=[10.914, 0, 0, 0, 0, 0, 0]; InitialValuesUnits=ppm; WaterTableConcentration=0; D0=0; DepthConstant=0; MaxDepthSoluteAccessible=0; RunoffEffectivenessAtMovingSolute=0; MaxEffectiveRunoff=0
            SoilNitrogenNH4 NH4: Thickness=[150, 150, 150, 150, 200, 200, 200]; InitialValues=[3.983, 0, 0, 0, 0, 0, 0]; InitialValuesUnits=ppm; WaterTableConcentration=0; D0=0; DepthConstant=0; MaxDepthSoluteAccessible=0; RunoffEffectivenessAtMovingSolute=0; MaxEffectiveRunoff=0
            SoilNitrogenUrea Urea: Thickness=[150, 150, 150, 150, 200, 200, 200]; InitialValues=[0, 0, 0, 0, 0, 0, 0]; InitialValuesUnits=kg/ha; WaterTableConcentration=0; D0=0; DepthConstant=0; MaxDepthSoluteAccessible=0; RunoffEffectivenessAtMovingSolute=0; MaxEffectiveRunoff=0
          Manager SowingRule
            StartDate = 26-apr
            EndDate = 15-jul
            MinESW = 100
            MinRain = 15
            RainDays = 3
            CultivarName = Hartog
            SowingDepth = 30
            RowSpacing = 250
            Population = 150
```csharp
using Models.Interfaces;
using System;
using Models.Core;
using Models.PMF;
using Models.Soils;
using Models.Soils.Nutrients;
using Models.Utilities;
using APSIM.Shared.Utilities;
using Models.Climate;

namespace Models
{
    [Serializable]
    public class Script : Model
    {
        [Link] private Clock Clock;
        [Link] private Fertiliser Fertiliser;
        [Link] private Summary Summary;
        [Link(ByName = true)] private Plant Wheat;
        [Link] private Soil Soil;
        private Accumulator accumulatedRain;
        [Link]
        private ISoilWater waterBalance;
        
        [Description("Start of sowing window (d-mmm)")]
        public string StartDate { get; set;}
        [Description("End of sowing window (d-mmm)")]
        public string EndDate { get; set;}
        [Description("Minimum extractable soil water for sowing (mm)")]
        public double MinESW { get; set;}
        [Description("Accumulated rainfall required for sowing (mm)")]
        public double MinRain { get; set;}
        [Description("Duration of rainfall accumulation (d)")]
        public int RainDays { get; set;}
        [Description("Cultivar to be sown")]
        [Display(Type=DisplayType.CultivarName, PlantName = "Wheat")]
        public string CultivarName { get; set;}
        [Description("Sowing depth (mm)")]
        public double SowingDepth { get; set;}        
        [Description("Row spacing (mm)")]
        public double RowSpacing { get; set;}    
        [Description("Plant population (/m2)")]
        public double Population { get; set;}    
        
        
        [EventSubscribe("StartOfSimulation")]
        private void OnSimulationCommencing(object sender, EventArgs e)
        {
            accumulatedRain = new Accumulator(this, "[Weather].Rain", RainDays);
        }
        

        [EventSubscribe("DoManagement")]
        private void OnDoManagement(object sender, EventArgs e)
        {
            accumulatedRain.Update();
            
            if (DateUtilities.WithinDates(StartDate,Clock.Today,EndDate) &&
                !Wheat.IsAlive &&
                MathUtilities.Sum(waterBalance.ESW) > MinESW &&
                accumulatedRain.Sum > MinRain)
            {
               Wheat.Sow(population:Population, cultivar:CultivarName, depth:SowingDepth, rowSpacing:RowSpacing);    
            }
        
        }
        
    }
}
```
          Manager Sow on a fixed date
            Crop = [Wheat]
            SowDate = 02-Jun
            CultivarName = Hartog
            SowingDepth = 30
            RowSpacing = 250
            Population = 150
```csharp
using APSIM.Shared.Utilities;
using Models.Utilities;
using Models.Soils;
using Models.PMF;
using Models.Core;
using System;

namespace Models
{
    [Serializable]
    public class Script : Model
    {
        [Link] Clock Clock;
        [Link] Fertiliser Fertiliser;
        [Link] Summary Summary;
        [Link] Soil Soil;
        
        [Description("Crop")]
        public IPlant Crop { get; set; }

        [Description("Sowing date (d-mmm)")]
        public string SowDate { get; set; }

        [Display(Type = DisplayType.CultivarName)]
        [Description("Cultivar to be sown")]
        public string CultivarName { get; set; }

        [Description("Sowing depth (mm)")]
        public double SowingDepth { get; set; }

        [Description("Row spacing (mm)")]
        public double RowSpacing { get; set; }

        [Description("Plant population (/m2)")]
        public double Population { get; set; }

        [EventSubscribe("DoManagement")]
        private void OnDoManagement(object sender, EventArgs e)
        {
            if (DateUtilities.WithinDates(SowDate, Clock.Today, SowDate))
            {
                Crop.Sow(population: Population, cultivar: CultivarName, depth: SowingDepth, rowSpacing: RowSpacing);    
            }
        }
    }
}
```
          Manager Fertilise on fixed dates
            iniSW = 0.21
            iniNH4N = 8.3
            iniNO3N = 22.75
            FertiliserType = UreaN
            FertiliserDates = 05-jul
            Amount = 60
            AmountType = False
```csharp
using APSIM.Shared.Utilities;
using Models.PMF;
using Models.Core;
using System;
using Newtonsoft.Json;
using Models.Climate;
using Models.Interfaces;
using Models.Soils;
using Models.Utilities;
using Models.Surface;
using System.Xml.Serialization;
using Models.Soils.Nutrients;

namespace Models
{
    [Serializable]
    public class Script : Model
    {
        [Link] Clock Clock;
        [Link] Fertiliser Fertiliser;
        [Link] private Zone myZone;
        [Link] private Summary Summary;
        [Link] private SoilNitrogen SoilN;
        [Link] private Soil soil;
        [Link] private SoilNitrogenNH4 SoilNH4;
        [Link] private Weather Weather;
        [Link] private Plant Wheat;
        [Link(ByName = true)] private ISolute Urea;
        [Link(ByName = true)] private ISolute NO3;
        [Link(ByName = true)] private ISolute NH4;
        [Link]
        private IPhysical soilPhysical;
        [Link]
        private ISoilWater waterBalance;
        [Separator("A component to reset soil water and nitrogen to measured value at fertilisation")]
        [Description("Initial Soil Water (mm/mm)")]
        public double iniSW { get; set; }
        [Description("Initial Soil NH4N (kg/ha)")]
        public double iniNH4N { get; set; }
        [Description("Initial Soil NO3N (kg/ha)")]
        public double iniNO3N { get; set; }
        [Separator("A component to apply fertiliser on one or more dates on every year of the simulation")]

        [Description("Type of fertiliser to apply? ")] 
        public Fertiliser.Types FertiliserType { get; set; }

        [Description("Enter the fertilisation dates as dd-mmm with comma separation (any year information entered will be ignored): ")] 
        public string[] FertiliserDates { get; set; } 

        [Description("Amount of fertiliser to be applied (kg /ha)")] 
        public double Amount { get; set; }

        [Description("Is the above amount to be applied each time? (yes/ticked)? Or is it the total annual amount across all dates (no/unticked)")] 
        public bool AmountType { get; set; }

        public double[] myNH4 {get; set;}
        public double[] myNO3 {get; set;}
        [EventSubscribe("DoManagement")]
        private void OnDoManagement(object sender, EventArgs e)
        {
            foreach (string ddMMM in FertiliserDates)
            {
                if (DateUtilities.DatesEqual(ddMMM, Clock.Today))
                {
                    // resetting N
                    myNH4 = SoilNH4.kgha;
                    myNH4[0] = iniNH4N;
                    SoilNH4.SetKgHa(SoluteSetterType.Other, myNH4);
                    myNO3 = NO3.kgha;
                    myNO3[0] = iniNO3N;
                    NO3.SetKgHa(SoluteSetterType.Other, myNO3);

                    // resetting SW

                    waterBalance.SW[0] = iniSW;   

                    Summary.WriteMessage(this, "Resetting N and SW to measured value (top soil)", MessageType.Diagnostic); 
                    Summary.WriteMessage(this, string.Format("SoilNH4 = {0}, NO3 = {1}, SW = {2}", iniNH4N, iniNO3N, iniSW), MessageType.Diagnostic);
                    if (AmountType)
                        Fertiliser.Apply(Amount: Amount, Type: FertiliserType);
                    else
                        Fertiliser.Apply(Amount: Amount / FertiliserDates.Length, Type: FertiliserType);
                }
            }
        }
    }
}
```
          Manager Volatilisation
            ResetN = Yes
            ResetMethod = Schwenke
            FertDate = 05-jul
            EndDate = 04-aug
            Cropped = Crop
            CoarseSand = 9.4
            FineSand = 0
            Wind = VariableWind
            WindSpeed = 0
            Water = Simulated
            initSW = 0.21
```csharp
using Newtonsoft.Json;
using Models.Climate;
using Models.Interfaces;
using System;
using Models.Core;
using Models.PMF;
using Models.Soils;
using Models.Utilities;
using Models.Surface;
using APSIM.Shared.Utilities;
using System.Xml.Serialization;
using Models.Soils.Nutrients;

namespace Models
{ 
  [Serializable]
  public class Script : Model
  {
    [Link] private Clock Clock;
    [Link] private Zone myZone;
    [Link] private Summary Summary;
    [Link] private Fertiliser Fertiliser;
    [Link] private SoilNitrogen SoilN;
    [Link] private Irrigation irrigation;
    [Link] private Weather Met;
    [Link] private Soil soil;
    [Link] private SoilNitrogenNH4 SoilNH4;
    [Link] private Weather Weather;
    [Link(ByName = true)] private ISolute Urea;
    [Link(ByName = true)] private ISolute NO3;
    [Link(ByName = true)] private ISolute NH4;
    [Link]
    private IPhysical soilPhysical;
    [Link]
    private ISoilWater waterBalance;    
    [JsonIgnore] public double NH4N { get; set; }

    [Description("Reset SoilNH4 due to volatilisation (Yes or No)")]
    public string ResetN {get;set;}
    
    [Description("Reset Method (Schwenke or Johnson)")]
    public string ResetMethod {get;set;}

    [Separator("Required parameters")]
    
    [Description("Fertilisation date (dd-mmm)")]
    public string FertDate { get; set; }
    
    [Description("End of volatilisation period (dd-mmm)")]
    public string EndDate { get; set; }
    
    [Separator("Only for Schwenke's method")]
    [Description("Is the field in crop or fallow? (Crop or Fallow)")]
    public string Cropped { get; set; }
    
    
    [Description("Coarse sand in the surface soil layer (%)")]
    public double CoarseSand { get; set; }
    
    [Description("Fine sand in the surface soil layer (%)")]
    public double FineSand { get; set; }
    
    [Description("Is WindSpeed the average for the period? If variable leave 0 the next field (FixedWind or VariableWind)")]
    public string Wind { get; set; }
    
    [Description("Average Wind Speed? (m/s)")]
    public double WindSpeed { get; set; }
    
    [Description("Using measured initial soil water or using simulated soil water (Measured or Simulated)")]
    public string Water { get; set; }
    
    [Description("Initial Soil Water (mm/mm)")]
    public double initSW { get; set; }
    
    // Variables available for reporting

    public double SW {get; set;}
    public double VariableWind {get; set;}

    

    public double vol_red {get; set;}
    public double epsilon {get; set;}
    public double Eo {get; set;}
    public double Ea {get; set;}
    public double rain {get; set;}
    
    
    public double currentNH4 {get; set;}
    public double NH4reduction {get; set;}
    public double newNH4 {get; set;}
    public double[] myNewNH4 {get; set;}
    public double currentUrea {get; set;}
    public double UreaReduction {get; set;}
    public double newUrea {get; set;}
    public double[] myNewUrea {get; set;}
    
    [EventSubscribe("DoManagementCalculations")]
    private void OnDoManagement(object sender, EventArgs e)
    {
      //Set up the Schwenke method to reduce SoilNH4  
      if (ResetN == "Yes" && ResetMethod == "Schwenke")
      {   
        // get soil water for first layer
        SW = waterBalance.SW[0];
        // set up wind parameters 
        VariableWind = Weather.Wind;

        if (Cropped == "Crop"){
         if (Wind == "VariableWind" && (DateUtilities.WithinDates(FertDate, Clock.Today, EndDate)))
          {
            Summary.WriteMessage(this, "Reset Nitrogen by Schwenke's method", MessageType.Diagnostic);
            CalcNewNH4SchwenkeVariableWind();
            Summary.WriteMessage(this, "About to set myNewNH4[0] to: " + myNewNH4[0].ToString(), MessageType.Diagnostic);
            SoilNH4.SetKgHa(SoluteSetterType.Other, myNewNH4);
            
          }
          if (Wind == "FixedWind" && (DateUtilities.WithinDates(FertDate, Clock.Today, EndDate)))
          {
                         Summary.WriteMessage(this, "Reset Nitrogen by Schwenke's method", MessageType.Diagnostic);
                         CalcNewNH4SchwenkeFixedWind();
                         Summary.WriteMessage(this, "About to set myNewNH4[0] to: " + myNewNH4[0].ToString(), MessageType.Diagnostic);
                         SoilNH4.SetKgHa(SoluteSetterType.Other, myNewNH4);

          }          
        }
        if (Cropped == "Fallow"){
          Summary.WriteMessage(this, "Reset Nitrogen by Schwenke's method Fallow", MessageType.Diagnostic);
          if (WindSpeed == 0){ WindSpeed = 2;}
          CalcNewNH4SchwenkeFixedWindF();
          Summary.WriteMessage(this, "About to set myNewNH4[0] to: " + myNewNH4[0].ToString(), MessageType.Diagnostic);
          SoilNH4.SetKgHa(SoluteSetterType.Other, myNewNH4);
        }
      }
      //Set up the Johnson method to reduce SoilNH4  
      if (ResetN == "Yes" && ResetMethod == "Johnson")
      {   
        Eo = waterBalance.Eo;
        Ea = waterBalance.Es;
        rain = Weather.Rain;
        epsilon = Math.Max(0, (Ea - rain) / Eo);
        if (DateUtilities.WithinDates(FertDate, Clock.Today, EndDate))
        {
          
          Summary.WriteMessage(this, "Reset Nitrogen by Johnson's method", MessageType.Diagnostic);
          CalcNewNH4Johnson();
          Summary.WriteMessage(this, "About to set myNewNH4[0] to: " + myNewNH4[0].ToString(), MessageType.Diagnostic);
          SoilNH4.SetKgHa(SoluteSetterType.Other, myNewNH4);                  
          Summary.WriteMessage(this, "About to set myNewUrea[0] to: " + myNewUrea[0].ToString(), MessageType.Diagnostic);
          SoilN.Urea.SetKgHa(SoluteSetterType.Other, myNewUrea);
        }
      }
    }
    // Functions to use
    // Calculate the adjusted values of the NH4 by Schwenke's equation in the first layer
    private void CalcNewNH4SchwenkeVariableWind()
    {
     currentNH4 = SoilNH4.kgha[0];
     // Create reports about variables and reset function
     Summary.WriteMessage(this, string.Format("SoilNH4.kgha[0] = {0}", SoilNH4.kgha[0]), MessageType.Diagnostic);
     // Calculate daily reduction (%) of SoilNH4 
     if (Water == "Measured" )
     {
     vol_red = (Math.Max(0, (11.29 + (0.31 * CoarseSand) - (2.78 * VariableWind*3.6) + (initSW * 18.65))))/30;
     }
     if (Water == "Simulated" )
     {
      vol_red = (Math.Max(0, (11.29 + (0.31 * CoarseSand) - (2.78 * VariableWind*3.6) + (SW * 18.65))))/30;
      }
      newNH4 = currentNH4 - (currentNH4 * (vol_red/100));
      myNewNH4 = new double[] {newNH4};
      // Create reports about variables and reset function
      Summary.WriteMessage(this, string.Format("newNH4 = {0}, vol_red = {1}, currentNH4 = {2}, initSW = {3}", newNH4, vol_red, currentNH4, initSW), MessageType.Diagnostic);
      }
    // Calculate the adjusted values of the NH4 by Schwenke's equation in the first layer using FixedWind
    private void CalcNewNH4SchwenkeFixedWind()
    {
      currentNH4 = SoilNH4.kgha[0];
      // Create reports about variables and reset function
      Summary.WriteMessage(this, string.Format("SoilNH4.kgha[0] = {0}", SoilNH4.kgha[0]), MessageType.Diagnostic);
      // Calculate daily reduction (%) of SoilNH4 
      if (Water == "Measured" ){
      vol_red = (Math.Max(0, (11.29 + (0.31 * CoarseSand) - (2.78 * WindSpeed*3.6) + (initSW * 18.65))))/30;
      }
      if (Water == "Simulated" ){
      vol_red = (Math.Max(0, (11.29 + (0.31 * CoarseSand) - (2.78 * WindSpeed*3.6) + (SW * 18.65))))/30;
      }      
      newNH4 = currentNH4 - (currentNH4 * (vol_red/100));
      
      myNewNH4 = new double[] {newNH4};
      // Create reports about variables and reset function
      Summary.WriteMessage(this, string.Format("newNH4 = {0}, vol_red = {1}, currentNH4 = {2}, initSW = {3}", newNH4, vol_red, currentNH4, initSW), MessageType.Diagnostic);
    }
    
    private void CalcNewNH4SchwenkeFixedWindF()
    {
      currentNH4 = SoilNH4.kgha[0];
      // Create reports about variables and reset function
      Summary.WriteMessage(this, string.Format("SoilNH4.kgha[0] = {0}", SoilNH4.kgha[0]), MessageType.Diagnostic);
            // Calculate daily reduction (%) of SoilNH4 
      if (Water == "Measured" ){
      vol_red = Math.Max(0, (-7.62 + (0.46 * FineSand) + (21.99 * initSW) + (2.89 * WindSpeed*3.6))/30);
      }
      if (Water == "Simulated" ){
      vol_red = Math.Max(0, (-7.62 + (0.46 * FineSand) + (21.99 * SW) + (2.89 * WindSpeed*3.6))/30);
      }            


      newNH4 = currentNH4 - (currentNH4 * (vol_red/100));
      
      myNewNH4 = new double[] {newNH4};
      // Create reports about variables and reset function
      Summary.WriteMessage(this, string.Format("newNH4 = {0}, vol_red = {1}, currentNH4 = {2}, initSW = {3}", newNH4, vol_red, currentNH4, initSW), MessageType.Diagnostic);
    }
    
    // Calculate the adjusted values of the NH4 by Johnson's equation in the first layer
    private void CalcNewNH4Johnson()
    {
     currentNH4 = SoilNH4.kgha[0];
     currentUrea = Urea.kgha[0];
     // Create reports about variables and reset function
     Summary.WriteMessage(this, string.Format("SoilNH4.kgha[0] = {0}", SoilNH4.kgha[0]), MessageType.Diagnostic);

     //Calculates the NH4 reduction (kg/ha)
     NH4reduction = epsilon * currentNH4 * 0.02;
     newNH4 = currentNH4 - NH4reduction;

     //Calculates the Urea reduction (kg/ha)
     UreaReduction = epsilon * currentUrea * 0.2;
     newUrea = currentUrea - UreaReduction;

     myNewNH4 = new double[] {newNH4};
     myNewUrea = new double[] {newUrea};
     // Create reports about variables and reset function
     Summary.WriteMessage(this, string.Format("currentNH4 = {0}, newNH4 = {1}, currentUrea = {2}, newUrea = {3}, epsilon = {4}, Ea = {5}, Eo = {6}, rain = {7}", currentNH4, newNH4, currentUrea, newUrea, epsilon, Ea, Eo, rain), MessageType.Diagnostic);
	 }
  }
}
```
          Manager Harvest
```csharp
using Models.Soils.Nutrients;
using System;
using Models.Core;
using Models.PMF;
using Models.Soils;
using Models.Soils.Nutrients;
using Models.Utilities;
using APSIM.Shared.Utilities;

namespace Models
{
    [Serializable]
    public class Script : Model
    {
        [Link] Plant Wheat;

        [EventSubscribe("DoManagement")]
        private void OnDoManagement(object sender, EventArgs e)
        {
            if (Wheat.IsReadyForHarvesting)
            {
               Wheat.Harvest();
               Wheat.EndCrop();    
            }
        
        }
        
    }
}
```
          Irrigation
          Report DailyReportS: EventNames=[Clock].DoReport
            VariableNames:
              [Clock].Today
              ([Volatilisation].Script.currentNH4-[Volatilisation].Script.newNH4) as deltaN
              [Volatilisation].Script.NH4reduction+[Volatilisation].Script.UreaReduction as deltaN
              [Soil].NH4.kgha[0] as NH4
          Report: EventNames=[Clock].DoReport
            VariableNames:
              [Clock].Today
              [Wheat].Phenology.Zadok.Stage
              [Wheat].Phenology.CurrentStageName
              [Wheat].AboveGround.Wt
              [Wheat].AboveGround.N
              [Wheat].Grain.Total.Wt*10 as Yield
              [Wheat].Grain.Protein
              [Wheat].Grain.Size
              [Wheat].Grain.Number
              [Wheat].Grain.Total.Wt
              [Wheat].Grain.Total.N
              [Wheat].Total.Wt
      Simulation 1_Johnson
        Clock: Start=2011-05-05; End=2011-08-06
        Summary SummaryFile
        Weather
          FileName=C:\Users\u8012681\OneDrive - USQ\Work\Research\CRC HPS\PJA4.3.002\ProjectWork\Modelling\SoilN\data\climate\Paddock1.met
        SoilArbitrator
        Zone Field: Area=1; Slope=0; AspectAngle=0; Altitude=50
          Soil: ASCOrder=NA; ASCSubOrder=NA; SoilType=Clay Loam over Clay; Site=24171_44108; NearestTown=NARRABRI; Region=Brigalow Belt South; State=New South Wales; NaturalVegetation=Cleared, non-native vegetation, buildings; ApsoilNumber=9999; Latitude=-30.143; Longitude=149.757; LocationAccuracy=+- 90m; YearOfSampling=2021; Comments=Landuse is Cereals
            DataSource=Soil and Landscape Grid of Australia. This soil parameter file was automatically generated from the GSM National Surfaces using pedotransfer functions.
            Physical: same as InCrop.Paddock1.1_Schwenke.Field.Soil.Physical
            WaterBalance SoilWater: same as InCrop.Paddock1.1_Schwenke.Field.Soil.SoilWater
            Organic: same as InCrop.Paddock1.1_Schwenke.Field.Soil.Organic
            Chemical: Thickness=[150, 150, 150, 150, 200, 200, 200]; PHUnits=Water
              PH=[7.50819, 7.81369, 8.05394, 8.15907, 8.24905, 8.31702, 8.34813]
            Water: Thickness=[150, 150, 150, 150, 200, 200, 200]; FilledFromTop=true
              InitialValues=[0.362886, 0.367366, 0.378878, 0.382213, 0.381036, 0.377493, 0.373804]
            CERESSoilTemperature
            SoilNitrogen: fom_types=[default, manure, mucuna, lablab, shemp, stable]; fract_carb=[0.2, 0.3, 0.54, 0.57, 0.45, 0]; fract_cell=[0.7, 0.3, 0.37, 0.37, 0.47, 0.1]; fract_lign=[0.1, 0.4, 0.09, 0.06, 0.08, 0.9]; NPartitionApproach=0
            SoilNitrogenNO3 NO3: same as InCrop.Paddock1.1_Schwenke.Field.Soil.NO3
            SoilNitrogenNH4 NH4: same as InCrop.Paddock1.1_Schwenke.Field.Soil.NH4
            SoilNitrogenUrea Urea: same as InCrop.Paddock1.1_Schwenke.Field.Soil.Urea
          Fertiliser
          SurfaceOrganicMatter: InitialResidueName=wheat_stubble; InitialResidueType=wheat; InitialResidueMass=500; InitialStandingFraction=0; InitialCPR=0; InitialCNR=100
          Plant Wheat
          MicroClimate: a_interception=0; b_interception=1; c_interception=0; d_interception=0; SoilHeatFluxFraction=0.4; MinimumHeightDiffForNewLayer=0; NightInterceptionFraction=0.5; ReferenceHeight=2
          Manager SowingRule: same as InCrop.Paddock1.1_Schwenke.Field.SowingRule
          Manager Sow on a fixed date: same as InCrop.Paddock1.1_Schwenke.Field.Sow on a fixed date
          Manager Fertilise on fixed dates: same as InCrop.Paddock1.1_Schwenke.Field.Fertilise on fixed dates
          Manager Volatilisation
            ResetN = Yes
            ResetMethod = Johnson
            FertDate = 05-jul
            EndDate = 04-aug
            Cropped = Crop
            CoarseSand = 9.4
            FineSand = 0
            Wind = VariableWind
            WindSpeed = 0
            Water =
            initSW = 0
            script: same as in InCrop.Paddock1.1_Schwenke.Field.Volatilisation
          Manager Harvest: same as InCrop.Paddock1.1_Schwenke.Field.Harvest
          Irrigation
          Report DailyReportJ: EventNames=[Clock].DoReport
            VariableNames:
              [Clock].Today
              [Volatilisation].Script.NH4reduction+[Volatilisation].Script.UreaReduction as deltaN
          Report: EventNames=[Wheat].Harvesting
            VariableNames:
              [Clock].Today
              [Wheat].Phenology.Zadok.Stage
              [Wheat].Phenology.CurrentStageName
              [Wheat].AboveGround.Wt
              [Wheat].AboveGround.N
              [Wheat].Grain.Total.Wt*10 as Yield
              [Wheat].Grain.Protein
              [Wheat].Grain.Size
              [Wheat].Grain.Number
              [Wheat].Grain.Total.Wt
              [Wheat].Grain.Total.N
              [Wheat].Total.Wt
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